units lj
atom_style atomic
region box block 0 2 0 2 0 2
create_box 1 box
create_atoms 1 single 1.0 1.0 1.0
mass 1 1.0
set type 1 element X

plugin load build/libcompute_hello_plugin.so

hello user test.out
